// COMSOL Multiphysics 6.3.0.335 model "1-D PV solar cell.mph"
// Outline of the model tree

Parameters
  thickness_ETL = 50[nm]
  thickness_HTL = 200[nm]
  thickness_PVK = 300[nm]
  Area = 4e-12[m^2]
  V_app = 0[V]

Geometry
  geom1 "Geometry 1" (1D, length unit nm)
    i1: Interval | coord = {0, 0+thickness_ETL}
    i2: Interval | coord = {0+thickness_ETL, thickness_ETL+thickness_PVK}
    i3: Interval | coord = {0+thickness_ETL, 0+thickness_ETL+thickness_PVK+thickness_HTL}
    fin: Finalize "Form Union"

Materials
  mat1: Common "HTL" on domains 3
    def: def "Basic"
      relpermittivity = 3
    SemicondMaterial: SemicondMaterial "Semiconductor material"
      Eg0 = 3[V]
      chi0 = 1.9[V]
      Nv = 1e20[1/cm^3]
      Nc = 1e20[1/cm^3]
      mun = 2[cm^2/(V*s)]
      mup = 1e-2[cm^2/(V*s)]
    SRH: SRH "Shockley–Read–Hall recombination"
      taun = 5[ns]
      taup = 5[ns]
  mat2: Common "PVK" on domains 2
    def: def "Basic"
      relpermittivity = 18
    SemicondMaterial: SemicondMaterial "Semiconductor material"
      Eg0 = 1.52[V]
      chi0 = 3.6[V]
      Nv = 5e18[1/cm^3]
      Nc = 5e18[1/cm^3]
      mun = 2[cm^2/(V*s)]
      mup = 2[cm^2/(V*s)]
    SRH: SRH "Shockley–Read–Hall recombination"
      taun = 100[ns]
      taup = 100[ns]
  mat3: Common "ETL" on domains 1
    def: def "Basic"
      relpermittivity = 31
    SemicondMaterial: SemicondMaterial "Semiconductor material"
      Eg0 = 3[V]
      chi0 = 4.1[V]
      Nv = 1e20[1/cm^3]
      Nc = 1e20[1/cm^3]
      mun = 1e-2[cm^2/(V*s)]
      mup = 2[cm^2/(V*s)]
    SRH: SRH "Shockley–Read–Hall recombination"
      taun = 5[ns]
      taup = 5[ns]

Physics
  semi: Semiconductor on all domains
    dependent variable V
    EquationForm.form = Stationary
    d.A = Area
    ModelProperties.CarrierStatistics = FermiDirac
    Continuation.DopingTrapDensityContinuation = None
    smm1: SemiconductorMaterialModel (default) | minput_temperature = 298.15[K]
    ins1: Insulation (default)
    zc1: ZeroCharge (default)
    ii1: InsulatorInterface (default)
    cont1: Continuity "Continuity/Heterojunction 1" (default)
    init1: init "Initial Values 1" (default)
    adm1: AnalyticDopingModel "ETL/n-type" on domains 1 | impurityType = donor; NDc = 1e18[1/cm^3]
    tar1: TrapAssistedRecombination on domains 1-3
    adm2: AnalyticDopingModel "HTL/p-type" on domains 3 | NAc = 1e18[1/cm^3]
    mc1: MetalContact "FTO contact" on boundaries 1 | V0 = V_app
    mc2: MetalContact "Au Contact" on boundaries 4 | V0 = V_app
    udg1: UDGeneration "User-Defined Generation 1" on domains 1-3 | Gn = 3e22[1/(cm^3*s)]; Gp = 3e22[1/(cm^3*s)]

Mesh
  mesh1 "Mesh 1" (physics-controlled)
    size: MeshSizeDefault | table = semi; hauto = 3

Studies
  std1 "Study 1"
    stat: Stationary | useparam = on; pname = V_app; plistarr = range(0,0.01,1.2); punit = V

Solver configurations
  sol1 "Solution 1" (study std1)
    v1: Variables "Dependent Variables 1"
    s1: Stationary "Stationary Solver 1"
      p1: Parametric
      fc1: FullyCoupled
      d1: Direct

Datasets
  dset1: Solution | solution = sol1

Plots
  pg1: PlotGroup1D "Energy Levels (semi)" | data = dset1; title = Energy Diagram; ylabel = Energy (eV)
    lngr1: LineGraph "Conduction Band Energy Level" on domains 1-3 | expr = semi.Ec_e; unit = eV; legends = Ec
    lngr2: LineGraph "Electron Quasi-Fermi Energy Level" on domains 1-3 | expr = semi.Efn_e; unit = eV; legends = Efn
    lngr3: LineGraph "Hole Quasi-Fermi Energy Level" on domains 1-3 | expr = semi.Efp_e; unit = eV; legends = Efp
    lngr4: LineGraph "Valence Band Energy Level" on domains 1-3 | expr = semi.Ev_e; unit = eV; legends = Ev
  pg2: PlotGroup1D "Carrier Concentrations (semi)" | data = dset1; ylabel = Carrier concentration (1/cm^3)
    lngr1: LineGraph "Electron Concentration" on domains 1-3 | expr = semi.N; unit = 1/cm^3; legends = electrons
    lngr2: LineGraph "Hole Concentration" on domains 1-3 | expr = semi.P; unit = 1/cm^3; legends = holes
  pg3: PlotGroup1D "Electric Potential (semi)" | data = dset1; ylabel = Electric Potential (V)
    lngr1: LineGraph on domains 1-3 | expr = V
  pg4: PlotGroup1D "Net Dopant Concentration (semi)"
    data = dset1
    ylabel = Net Dopant Concentration \vert N<sub>d</sub> - N<sub>a</sub>\vert, 1/cm<sup>3</sup>
    lngr1: LineGraph "P-type" on all domains | expr = semi.Nnetdop; unit = 1/cm^3; xdataexpr = X; legends = P-type (Red)
      filt1: LineGraphFilter "Filter 1" | expr = semi.Na-semi.Nd > 1[1/cm^3]
    lngr2: LineGraph "N-type" on all domains | expr = semi.Nnetdop; unit = 1/cm^3; xdataexpr = X; legends = N-type (Blue)
      filt1: LineGraphFilter "Filter 1" | expr = semi.Nd-semi.Na > 1[1/cm^3]
  pg5: PlotGroup1D "1D Plot Group 5" | data = dset1
    glob1: Global | expr = semi.I0_2/Area; unit = mA/cm^2